<!-- Generated on Jun 24, 2016 1:39:32 PM from  NESTML-model "iaf_psc_alpha_nestml".-->

<Lems xmlns="http://www.neuroml.org/lems/0.7.4"
      xmlns:xsi="http://www.w3.org/2001/XMLSchema-instance"
      xsi:schemaLocation="http://www.neuroml.org/lems/0.7.4 https://raw.githubusercontent.com/LEMS/LEMS/master/Schemas/LEMS/LEMS_v0.7.4.xsd"
      description="Generated from NESTML...">

    <Include file="units_dimensions.xml"/>

    <ComponentType name="iaf_psc_alpha_nestml">
        <!--Following elements are not supported or required by LEMS:-->
        <!--Not supported function call(s) found in differential equation of "V" in lines <12,4> to <12,108>.-->

        <Parameter name="I_e" dimension="current"/>

        <DerivedParameter name="V_reset" dimension="voltage" value="-constant70mV-E_L"/>
        <DerivedParameter name="Theta" dimension="voltage" value="-constant55mV-E_L"/>

        <Constant name="V_init" dimension="voltage" value="0mV"/>
        <Constant name="C_m" dimension="capacitance" value="250pF"/>
        <Constant name="Tau" dimension="time" value="10ms"/>
        <Constant name="tau_syn_in" dimension="time" value="2ms"/>
        <Constant name="tau_syn_ex" dimension="time" value="2ms"/>
        <Constant name="t_ref" dimension="time" value="2ms"/>
        <Constant name="E_L" dimension="voltage" value="-70mV"/>
        <Constant name="constant70mV" dimension="voltage" value="70mV"/>
        <Constant name="constant55mV" dimension="voltage" value="55mV"/>
        <Constant name="RefractoryCounts" dimension="none" value="5"/>

        <EventPort name="ex_spikes" direction="in"/>
        <EventPort name="in_spikes" direction="in"/>
        <!--<EventPort name="currents" direction="in"/>-->
        <EventPort name="spike" direction="out"/>

        <Dynamics>
            <StateVariable name="V" dimension="voltage"/>
            <StateVariable name="r" dimension="none"/>
            <StateVariable name="I_shape_in" dimension="none"/>
            <StateVariable name="I_shape_ex" dimension="none"/>
            <StateVariable name="lastSpikeTime" dimension="time"/>

            <DerivedVariable name="V_m" dimension="voltage" value="V+E_L"/>

            <DerivedVariable variable="I_shape_in" value="((exp(1)/tau_syn_in)*t*exp(-1/tau_syn_in*t))/t"/>
            <DerivedVariable variable="I_shape_ex" value="((exp(1)/tau_syn_ex)*t*exp(-1/tau_syn_ex*t))/t"/>

            <OnStart>
                <StateAssignment variable="V" value="V_init"/>
                <StateAssignment variable="r" value="0"/>
            </OnStart>

            <Regime name="refractory">
                <OnEntry>
                    <StateAssignment variable="lastSpikeTime" value="t" />
                    <StateAssignment variable="V" value="V_reset" />
                </OnEntry>
                <OnCondition test="t .gt. lastSpikeTime + t_ref">
                    <Transition regime="integrating" />
                </OnCondition>
            </Regime>

            <Regime name="integrating" initial="true">
                <TimeDerivative variable="V" value="-1/Tau * V + 1/C_m * ( I_e )" />
                <OnCondition test="V .geq. Theta">
                    <EventOut port="spike"/>
                    <Transition regime="refractory" />
                </OnCondition>
                <OnEvent port="ex_spikes">
                  <StateAssignment variable="I_shape_ex" value="I_shape_ex + 1"/>
                </OnEvent>
                <OnEvent port="in_spikes">
                  <StateAssignment variable="I_shape_in" value="I_shape_in - 1"/>
                </OnEvent>
            </Regime>

        </Dynamics>
    </ComponentType>

    <Component id="iaf_psc_alpha_nestml_instance1" type="iaf_psc_alpha_nestml" I_e="0pA"/>
    <Component id="iaf_psc_alpha_nestml_instance2" type="iaf_psc_alpha_nestml" I_e="1000pA"/>

</Lems>
